ORIGIN ≡ 1
z := [0.367; 0.7; 0.612]
k := [0.01; 0.1; 0.01]
h := [-0.21; 0.01; -0.281]
A := [-0.2, 0.7, -0.5; 0, -0.4, 0.8; 0, 0, 0.3]
ksi1 := 0.2
λ := eigenvals(A)
λ = [-0.2; -0.4; 0.3]
ksi2 := -0.2
ksi3 := 0.1
X := eigenvec(A, 0.3)
X = [0.367461; 0.699926; 0.612435]
ξ := transpose([0.2, -0.2, 0.1])
D(t, z) := [
    A[1, 1]*z[1] + A[1, 2]*z[2] + A[1, 3]*z[3];
    A[2, 1]*z[1] + A[2, 2]*z[2] + A[2, 3]*z[3];
    A[3, 1]*z[1] + A[3, 2]*z[2] + A[3, 3]*z[3]
]
n := 0, 1 .. 100
Y := rkfixed(z, 0, 10, 100, D)
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Y = [
    0, 0.367, 0.7, 0.612;
    0.1, 0.378226, 0.721278, 0.630638;
    0.2, 0.38979, 0.743206, 0.649844;
    0.3, 0.401702, 0.765804, 0.669635;
    0.4, 0.413974, 0.78909, 0.690028;
    0.5, 0.426617, 0.813088, 0.711043;
    0.6, 0.439641, 0.837818, 0.732697;
    0.7, 0.45306, 0.863302, 0.755011;
    0.8, 0.466884, 0.889563, 0.778004;
    0.9, 0.481127, 0.916625, 0.801698
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]
Y = [
    0, 0.367, 0.7, 0.612;
    0.1, 0.378226, 0.721278, 0.630638;
    0.2, 0.38979, 0.743206, 0.649844;
    0.3, 0.401702, 0.765804, 0.669635;
    0.4, 0.413974, 0.78909, 0.690028;
    0.5, 0.426617, 0.813088, 0.711043;
    0.6, 0.439641, 0.837818, 0.732697;
    0.7, 0.45306, 0.863302, 0.755011;
    0.8, 0.466884, 0.889563, 0.778004;
    0.9, 0.481127, 0.916625, 0.801698
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]
