ORIGIN ≡ 1
ORIGIN ≡ 1
a11 := -0.4
a21 := 0
a31 := 0.7
E1 := -0.3
# А - исходная матрица
# Е - исходные помехи
# В - матрица управления (заполняется вручную)
# Lam - собственные числа матрицы А
# SV1, SV2, SV3 - собственные векторы матрицы А
# h1, h2, h3 - шаг моделирования, определённый из погрешностей
a12 := 0.6
a22 := -0.3
a32 := -0.7
E2 := 0.2
A := [-0.4, 0, 0.7; 0.6, -0.3, -0.7; 0, 0, -0.2]
E := [-0.3; 0.2; -0.3]
a13 := 0
a23 := 0
a33 := -0.2
E3 := -0.3
Lam := eigenvals(A) = [-0.3; -0.4; -0.2]
h1 := |nthroot(E[1], 5)| = 0.786003
matrixA := [a11, a21, a31; a12, a22, a32; a13, a23, a33]
h2 := |nthroot(E[2], 5)| = 0.72478
SV1 := eigenvec(A, Lam[1]) = [0; -1; 0]
Lambda := eigenvals(matrixA)
h3 := |nthroot(E[3], 5)| = 0.786003
Lambda = [-0.3; -0.4; -0.2]
SV2 := eigenvec(A, Lam[2]) = [-0.164399; 0.986394; 0]
X := eigenvec(matrixA, -0.2)
SV3 := eigenvec(A, Lam[3]) = [0.241955; 0.967822; 0.0691301]
X = [0.241955; 0.967822; 0.0691301]
z := [0.242; 0.968; 0.069]
# Для SV1
P(t, SV1) := [
    A[1, 1]*SV1[1] + A[1, 2]*SV1[2] + A[1, 3]*SV1[3];
    A[2, 1]*SV1[1] + A[2, 2]*SV1[2] + A[2, 3]*SV1[3];
    A[3, 1]*SV1[1] + A[3, 2]*SV1[2] + A[3, 3]*SV1[3]
]
D(t, z) := [a11*z[1] + a12*z[2] + a13*z[3]; a21*z[1] + a22*z[2] + a23*z[3]; a31*z[1] + a32*z[2] + a33*z[3]]
Res := rkfixed(SV1, 0, 20, 1000, P)
n1 := 0, 1 .. 1000
Y := rkfixed(z, 0, 20, 1000, D)
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n := 0, 1 .. 1000
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P2(t, SV2) := [
    A[1, 1]*SV2[1] + A[1, 2]*SV2[2] + A[1, 3]*SV2[3];
    A[2, 1]*SV2[1] + A[2, 2]*SV2[2] + A[2, 3]*SV2[3];
    A[3, 1]*SV2[1] + A[3, 2]*SV2[2] + A[3, 3]*SV2[3]
]
Res := rkfixed(SV2, 0, 20, 1000, P2)
n1 := 0, 1 .. 1000
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D(t, z) := [
    a11*z[1] + a12*z[2] + a13*z[3] + E1;
    a21*z[1] + a22*z[2] + a23*z[3] + E2;
    a31*z[1] + a32*z[2] + a33*z[3] + E3
]
SV3 = [0.241955; 0.967822; 0.0691301]
Y := rkfixed(z, 0, 20, 1000, D)
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P3(t, SV3) := [
    A[1, 1]*SV3[1] + A[1, 2]*SV3[2] + A[1, 3]*SV3[3];
    A[2, 1]*SV3[1] + A[2, 2]*SV3[2] + A[2, 3]*SV3[3];
    A[3, 1]*SV3[1] + A[3, 2]*SV3[2] + A[3, 3]*SV3[3]
]
B1 := ln(-E1)
Res := rkfixed(SV3, 0, 20, 1000, P3)
B2 := 1/999999999999
n1 := 0, 1 .. 1000
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B3 := ln(-E3)
D(t, z) := [
    a11*z[1] + a12*z[2] + a13*z[3] + E1 + e^B1;
    a21*z[1] + a22*z[2] + a23*z[3] + E2 + e^B2;
    a31*z[1] + a32*z[2] + a33*z[3] + E3 + e^B3
]
SV3 = [0.241955; 0.967822; 0.0691301]
E2 = 0.2
Y := rkfixed(z, 0, 20, 1000, D)
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B := [-1.204; -3.6; -1.204]
SV3 = [0.241955; 0.967822; 0.0691301]
P3(t, SV3) := [
    A[1, 1]*SV3[1] + A[1, 2]*SV3[2] + A[1, 3]*SV3[3] + E[1] + e^B[1];
    A[2, 1]*SV3[1] + A[2, 2]*SV3[2] + A[2, 3]*SV3[3] + E[2] + e^B[2];
    A[3, 1]*SV3[1] + A[3, 2]*SV3[2] + A[3, 3]*SV3[3] + E[3] + e^B[3]
]
Res := rkfixed(SV3, 0, 20, 1000, P3)
n1 := 0, 1 .. 1000
ξ := 0.3
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